# Worksheet setting: ORIGIN = 1
# Численное решение нелинейных уравнеий, лаб2
f(x) := sqrt(log(x + 2)) - x
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root(f(x), x, 0, 2) → 0.650656121908
x := 1
root(f(x), x) = 0.650656
операция if условие  # слева - условие, справа - операция
ε := 0.00001
MPD(a, b, f, ε) :=
    return "КОрней нет" if f(a)*f(b) > 0
    i ← 0
    while |b - a| > ε
        x ← (a + b)/2
        i ← i + 1
        break if f(x) == 0
        b ← x if f(x) < 0
        a ← x otherwise
        M[i, 1] ← i
        M[i, 2] ← x
        M[i, 3] ← f(x)
    M
MPD1(a, b, f, ε) :=
    return "КОрней нет" if f(a)*f(b) > 0
    i ← 0
    while |b - a| > ε
        x ← (a + b)/2
        i ← i + 1
        break if f(x) == 0
        b ← x if f(x) < 0
        a ← x otherwise
    [i; x; f(x)]
MPD1(0, 2, f, x) = [1; 1; -0.30926]
root(f(x), x, 0, 2) → 0.650656121908
MPD(0, 2, f, ε) = [
    1, 1, -0.30926;
    2, 0.5, 0.130825;
    3, 0.75, -0.0871782;
    4, 0.625, 0.022402;
    5, 0.6875, -0.0322531;
    6, 0.65625, -0.00489069;
    7, 0.640625, 0.00876451;
    8, 0.648438, 0.00193911;
    9, 0.652344, -0.00147525;
    10, 0.650391, 0.000232066;
    11, 0.651367, -0.000621556;
    12, 0.650879, -0.000194736;
    13, 0.650635, 1.86674e-5;
    14, 0.650757, -8.80338e-5;
    15, 0.650696, -3.46831e-5;
    16, 0.650665, -8.00783e-6;
    17, 0.65065, 5.32978e-6;
    18, 0.650658, -1.33902e-6
]
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