# Worksheet setting: ORIGIN = 1
y(x) := (1 - sin(x - 0.5))/2
x1(y1) := 1.5 - cos(y1)
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x := 0
y := 0
Given
cos(y) + x == 1.5
2*y + sin(x - 0.5) == 1
z := Find(x, y) = [0.599662; 0.450251]
φ(x, y) := [1.5 - cos(y); (1 - sin(x - 0.5))/2]
a := 0.6
b := 0.45
φ1x(x, y) := d/dx(φ(x, y)[1]) → 0
φ1y(x, y) := d/dy(φ(x, y)[1]) → sin(y)
|φ1x(a, b)| + |φ1y(a, b)| = 0.434966
φ1x(x, y) := d/dx(φ(x, y)[2]) → -cos(x - 0.5)/2
φ1y(x, y) := d/dy(φ(x, y)[2]) → 0
|φ1x(a, b)| + |φ1y(a, b)| = 0.497502
f(x, y) := [cos(y) + x - 1.5; 2*y + sin(x - 0.5) - 1]
W(□)
