a := 3
y(x) := a^3/(x^2 + a^2)  # локон*Аньези
# 1. | Область определения функции (-∞; +∞)
# 2) Функция чётная
y(-x) → 27/(x^2 + 9)
# 3) Точка пересечения с OY: 3
y(0) → 3
y(x) solve →  # error: Решение не было найдено.
# точки перечесения с осью ОХ отсутствуют
4.
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# Вертикальных ассимптот и точек разрыва нет
# Непрерывна в области определения
# 5. | Исследование на бесконечности
limit(y(x), x → -∞) → 0
limit(y(x), x → ∞) → 0
# y = 0 - горизонтальная асимтота
# 6. | Наклонные асимптоты
k := limit(y(x)/x, x → ∞) → 0
b := limit(y(x) - k*x, x → ∞) → 0
f(x) := k*x + b
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# 7. | Исследование с первой производной
y1(x) := d/dx(y(x)) → -54*x/(x^2 + 9)^2
y1(x) solve → 0
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# Точка (0:3) точка локального максимума
y1(x) > 0 solve → x < 0  # интервал возрастания
y1(x) < 0 solve → 0 < x  # интервал убывания
# 8 | Исследование со второй производной
y2(x) := d^2/dx^2(y(x)) → 216*x^2/(x^2 + 9)^3 - 54/(x^2 + 9)^2
# Точки перегиба функции
y2(x) solve → [sqrt(3); -sqrt(3)]
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y2(x) > 0 solve → x < -sqrt(3) or sqrt(3) < x  # интервал вогнутости
y2(x) < 0 solve → -sqrt(3) < x < sqrt(3)  # интервал выпуклости
