# Задание 2
t := -50, -49.99 .. 50
R := 30
r := 4
x(t) := (R - r)*cos(r*t/R) + r*cos((R - r)*t/R)
гипоциклоида
y(t) := (R - r)*sin(r*t/R) - r*sin((R - r)*t/R)
x1(t) := R*cos(t)
y1(t) := R*sin(t)
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R := 2*r
r := 30
x(t) := (R - r)*cos(r*t/R) + r*cos((R - r)*t/R)
y(t) := (R - r)*sin(r*t/R) - r*sin((R - r)*t/R)
x1(t) := R*cos(t)
y1(t) := R*sin(t)
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