f(x) := sin(x - 0.5) - x + 0.8
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root(f(x), x, 0, 2) → 1.74851546754
ε := 0.00001
MPD(a, b, f, ε) :=
    return "КОрней нет" if f(a)*f(b) > 0
    i ← 0
    while |b - a| > ε
        x ← (a + b)/2
        i ← i + 1
        break if f(x) == 0
        b ← x if f(x) < 0
        a ← x otherwise
        M[i, 1] ← i
        M[i, 2] ← x
        M[i, 3] ← f(x)
    M
root(f(x), x, 0, 2) → 1.74851546754
MPD(0, 2, f, ε) = [
    0, 0, 0, 0;
    0, 1, 1, 0.279426;
    0, 2, 1.5, 0.141471;
    0, 3, 1.75, -0.00101538;
    0, 4, 1.625, 0.0772676;
    0, 5, 1.6875, 0.0399369;
    0, 6, 1.71875, 0.0199191;
    0, 7, 1.73438, 0.00956707;
    0, 8, 1.74219, 0.00430473;
    0, 9, 1.74609, 0.0016519;
    0, 10, 1.74805, 0.000320071;
    0, 11, 1.74902, -0.000347203;
    0, 12, 1.74854, -1.34529e-5;
    0, 13, 1.74829, 0.000153337;
    0, 14, 1.74841, 6.99492e-5;
    0, 15, 1.74847, 2.82499e-5;
    0, 16, 1.7485, 7.39898e-6;
    0, 17, 1.74852, -3.02684e-6;
    0, 18, 1.74851, 2.1861e-6
]
P := MPD(0, 2, f, ε)
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MPD1(a, b, f, ε) :=
    return "КОрней нет" if f(a)*f(b) > 0
    i ← 0
    while |b - a| > ε
        x ← (a + b)/2
        i ← i + 1
        break if f(x) == 0
        b ← x if f(x) < 0
        a ← x otherwise
    [i; x; f(x)]
MPD1(0, 2, f, ε) = [18; 1.74851; 2.1861e-6]
