# Worksheet setting: ORIGIN = 1
f(x) := sin(x - 0.5) - x + 0.8
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root(f(x), x, 0, 2) → 1.74851546754
ε := 0.00001
MPD(a, b, f, ε) :=
    return "КОрней нет" if f(a)*f(b) > 0
    i ← 0
    while |b - a| > ε
        x ← (a + b)/2
        i ← i + 1
        break if f(x) == 0
        b ← x if f(x) < 0
        a ← x otherwise
        M[i, 1] ← i
        M[i, 2] ← x
        M[i, 3] ← f(x)
    M
root(f(x), x, 0, 2) → 1.74851546754
MPD(1, 2, f, ε) = [
    1, 1.5, 0.141471;
    2, 1.75, -0.00101538;
    3, 1.625, 0.0772676;
    4, 1.6875, 0.0399369;
    5, 1.71875, 0.0199191;
    6, 1.73438, 0.00956707;
    7, 1.74219, 0.00430473;
    8, 1.74609, 0.0016519;
    9, 1.74805, 0.000320071;
    10, 1.74902, -0.000347203;
    11, 1.74854, -1.34529e-5;
    12, 1.74829, 0.000153337;
    13, 1.74841, 6.99492e-5;
    14, 1.74847, 2.82499e-5;
    15, 1.7485, 7.39898e-6;
    16, 1.74852, -3.02684e-6;
    17, 1.74851, 2.1861e-6
]
P := MPD(1, 2, f, ε)
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MPD1(a, b, f, ε) :=
    return "КОрней нет" if f(a)*f(b) > 0
    i ← 0
    while |b - a| > ε
        x ← (a + b)/2
        i ← i + 1
        break if f(x) == 0
        b ← x if f(x) < 0
        a ← x otherwise
    [i; x; f(x)]
MPD1(0, 2, f, ε) = [18; 1.74851; 2.1861e-6]
MH(a, b, f, ε) :=
    i ← 0
    while |b - a| > ε
        x ← a - f(a)*(b - a)/(f(b) - f(a))
        i ← i + 1
        break if f(x) == 0
        b ← x if f(x) > 0
        a ← x otherwise
        M[i, 1] ← i
        M[i, 2] ← x
        M[i, 3] ← f(x)
    M
MH(1, 2, f, ε) = [
    1, 1.5798, 0.102061;
    2, 1.91344, -0.125797;
    3, 1.72925, 0.0129905;
    4, 1.74649, 0.00138418;
    5, 1.7483, 0.000144565;
    6, 1.74849, 1.50668e-5;
    7, 1.74851, 1.56993e-6;
    8, 1.74852, 1.63581e-7;
    9, 1.74852, 1.70444e-8;
    10, 1.74852, 1.77596e-9;
    11, 1.74852, 1.85047e-10;
    12, 1.74852, 1.92812e-11;
    13, 1.74852, 2.00906e-12;
    14, 1.74852, 2.09388e-13;
    15, 1.74852, 0;
    16, 1.74852, 0;
    17, 1.74852, 0;
    18, 1.74852, 0;
    19, 1.74852, 0
]
P2 := MH(1, 2, f, ε)
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