# Worksheet setting: ORIGIN = 1
7.
f(x) := sin(x - 0.5) - x + 0.8
f1(x) := d/dx(f(x)) → cos(x - 0.5) - 1
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root(f(x), x, 1, 2) = 1.74852
ω := 0.000001
Newton2(a, b, f, f1, ω) :=
    x ← a if f(a)*d^2/da^2(f(a)) > 0
    x ← b otherwise
    k ← 0
    while 1
        h ← -f(x)/d/dx(f(x))
        x ← x + h
        k ← k + 1
        M[k, 1] ← k
        M[k, 2] ← x
        M[k, 3] ← f(x)
        break if |h| < ω
    M
Newton(a, b, f, f1, ω) :=
    x ← a if f(a)*d^2/da^2(f(a)) > 0
    x ← b otherwise
    k ← 0
    while 1
        h ← -f(x)/d/dx(f(x))
        x ← x + h
        k ← k + 1
        break if |h| ≤ ω
    [k; x; f(x)]
root(f(x), x, 1, 2) = 1.74852
P2 := Newton2(1, 2, f, f1, ω)
Newton(1, 2, f, f1, ω) = [4; 1.74852; -7.30527e-14]
P2 = [
    1, 1.78208, -0.0234698;
    2, 1.74927, -0.000514314;
    3, 1.74852, -2.68197e-7;
    4, 1.74852, -7.30527e-14
]
ε := 0.00001
hordMethod(a, b, f, ε) :=
    return "КОрней нет" if f(a)*f(b) > 0
    i ← 0
    x ← a
    while |f(x)| > ε
        x ← a - f(a)*(b - a)/(f(b) - f(a))
        i ← i + 1
        break if f(x) == 0
        b ← x if f(x) < 0
        a ← x otherwise
        M[i, 1] ← i
        M[i, 2] ← x
        M[i, 3] ← f(x)
    M
hordMethod1(a, b, f, ε) :=
    return "КОрней нет" if f(a)*f(b) > 0
    x ← a
    i ← 0
    while |f(x)| > ε
        x ← a - f(a)*(b - a)/(f(b) - f(a))
        i ← i + 1
        break if f(x) == 0
        b ← x if f(x) < 0
        a ← x otherwise
    [i; x; f(x)]
P3 := hordMethod1(1, 3, f, ε)
P4 := hordMethod(1, 2, f, ε)
P4 = [
    1, 1.5798, 0.102061;
    2, 1.72061, 0.0186965;
    3, 1.74423, 0.00292082;
    4, 1.74786, 0.000444515;
    5, 1.74842, 6.7379e-5;
    6, 1.7485, 1.0207e-5;
    7, 1.74851, 1.54607e-6
]
P3 = [15; 1.7485; 9.88986e-6]
Sekuchaya1(-10, -5, f, f1, ω) =  # error: Эта переменная не определена.
25.
h(z) := cos(z + 0.5) - z^3
h1(z) := d/dz(h(z)) → -sin(z + 0.5) - 3*z^2
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root(h(z), z, 0, 1) = 0.707998
z := 0.7
root(h(z), z) = 0.707998
Newton(0.7, 1, h, h1, ω) = [5; 0.707998; 0]
Newton2(0, 1, h, h1, ω) = [
    1, 0.767539, -0.153538;
    2, 0.711126, -0.00765181;
    3, 0.708007, -2.24434e-5;
    4, 0.707998, -1.94918e-10;
    5, 0.707998, 0
]
Sekuchaya(0.7, 0.8, h, h1, ω) =  # error
Sekuchaya1(0.7, 0.8, h, h1, ω) =  # error
