# Worksheet setting: ORIGIN = 1
5.
-2*π ≤ x ≤ 2*π
f(x) := (x - 2)*cos(x) - 1
f1(x) := d/dx(f(x)) → cos(x) - sin(x)*(x - 2)
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root(f(x), x, -2, -1) = -1.83463
ω := 0.000001
root(f(x), x, -5, -4) = -4.55934
root(f(x), x, 4, 6) = 5.0468
x := 1
Newton2(a, b, f, f1, ω) :=
    x ← a if f(a)*d^2/da^2(f(a)) > 0
    x ← b otherwise
    k ← 0
    while 1
        h ← -f(x)/d/dx(f(x))
        x ← x + h
        k ← k + 1
        M[k, 1] ← k
        M[k, 2] ← x
        M[k, 3] ← f(x)
        break if |h| < ω
    M
root(f(x), x) = 5.0468
Newton(a, b, f, f1, ω) :=
    x ← a if f(a)*d^2/da^2(f(a)) > 0
    x ← b otherwise
    k ← 0
    while 1
        h ← -f(x)/d/dx(f(x))
        x ← x + h
        k ← k + 1
        break if |h| ≤ ω
    [k; x; f(x)]
P2 := Newton2(-2, -1, f, f1, ω)
Newton(-2, -1, f, f1, ω) = [3; -1.83463; 0]
P2 = [1, -1.83604, 0.00559427; 2, -1.83463, 9.22706e-7; 3, -1.83463, 0]
root(f(x), x, -2, -1) = -1.83463
root(f(x), x, -5, -4) = -4.55934
Newton(-5, -4, f, f1, ω) = [5; -4.55934; 0]
root(f(x), x, 4, 6) = 5.0468
P1 := Newton2(-5, -4, f, f1, ω)
P11 := Newton2(5, 6, f, f1, ω)
P1 = [
    1, -4.75167, -1.26513;
    2, -4.56523, -0.0373386;
    3, -4.55935, -5.1087e-5;
    4, -4.55934, -9.69337e-11;
    5, -4.55934, 0
]
P11 = [
    1, 4.63286, -1.20916;
    2, 5.10796, 0.197595;
    3, 5.04722, 0.00134398;
    4, 5.0468, 7.80082e-8;
    5, 5.0468, 0
]
ε := 0.00001
hordMethod(a, b, f, ε) :=
    return "КОрней нет" if f(a)*f(b) > 0
    i ← 0
    x ← a
    while |f(x)| > ε
        x ← a - f(a)*(b - a)/(f(b) - f(a))
        i ← i + 1
        break if f(x) == 0
        b ← x if f(x) < 0
        a ← x otherwise
        M[i, 1] ← i
        M[i, 2] ← x
        M[i, 3] ← f(x)
    M
hordMethod1(a, b, f, ε) :=
    return "КОрней нет" if f(a)*f(b) > 0
    x ← a
    i ← 0
    while |f(x)| > ε
        x ← a - f(a)*(b - a)/(f(b) - f(a))
        i ← i + 1
        break if f(x) == 0
        b ← x if f(x) < 0
        a ← x otherwise
    [i; x; f(x)]
hordMethod1(-2, -1, f, ε) = [4; -1.83463; -4.30992e-7]
hordMethod(-2, -1, f, ε) = [
    1, -1.79772, -0.145582;
    2, -1.83407, -0.00221514;
    3, -1.83462, -3.09193e-5;
    4, -1.83463, -4.30992e-7
]
hordMethod1(-5, -4, f, ε) = [4; -4.55934; 4.89335e-6]
hordMethod(-5, -4, f, ε) = [1, -4.4946, 0.403283; 2, -4.5738, -0.091855; 3, -4.55911, 0.00145788; 4, -4.55934, 4.89335e-6]
hordMethod(5, 6, f, ε) = [1, 5.04984, 0.0097576; 2, 5.04657, -0.000746863; 3, 5.0468, -3.1366e-7]
