# Worksheet setting: ORIGIN = 1
# Вариант 7
f(x) := (x - 2)*cos(x) - 1
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ε := 0.00001
MPD(a, b, f, ε) :=
    return "КОрней нет" if f(a)*f(b) > 0
    i ← 0
    while |b - a| > ε
        x ← (a + b)/2
        i ← i + 1
        break if f(x) == 0
        b ← x if f(a)*f(x) < 0
        a ← x otherwise
        M[i, 1] ← i
        M[i, 2] ← x
        M[i, 3] ← f(x)
    M
MPD(-2, -1, f, ε) = [
    1, -1.5, -1.24758;
    2, -1.75, -0.331577;
    3, -1.875, 0.160692;
    4, -1.8125, -0.087451;
    5, -1.84375, 0.0361863;
    6, -1.82812, -0.0257495;
    7, -1.83594, 0.0051902;
    8, -1.83203, -0.0102868;
    9, -1.83398, -0.0025501;
    10, -1.83496, 0.00131961;
    11, -1.83447, -0.000615354;
    12, -1.83472, 0.0003521;
    13, -1.83459, -0.000131634;
    14, -1.83466, 0.000110231;
    15, -1.83463, -1.07017e-5;
    16, -1.83464, 4.97648e-5;
    17, -1.83463, 1.95315e-5
]
MPD(5, 6, f, ε) = [
    1, 5.5, 1.48034;
    2, 5.25, 0.664278;
    3, 5.125, 0.253133;
    4, 5.0625, 0.0504439;
    5, 5.03125, -0.049748;
    6, 5.04688, 0.000239454;
    7, 5.03906, -0.0247823;
    8, 5.04297, -0.0122783;
    9, 5.04492, -0.00602115;
    10, 5.0459, -0.00289127;
    11, 5.04639, -0.00132602;
    12, 5.04663, -0.000543308;
    13, 5.04675, -0.000151934;
    14, 5.04681, 4.37583e-5;
    15, 5.04678, -5.40881e-5;
    16, 5.0468, -5.165e-6;
    17, 5.04681, 1.92966e-5
]
root(f(x), x, -2, -1) = -1.83463
root(f(x), x, 5, 6) = 5.0468
P1 := MPD(5, 6, f, ε)
P := MPD(-2, -1, f, ε)
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MPD1(a, b, f, ε) :=
    return "КОрней нет" if f(a)*f(b) > 0
    i ← 0
    while |b - a| > ε
        x ← (a + b)/2
        i ← i + 1
        break if f(x) == 0
        b ← x if f(x) < 0
        a ← x otherwise
    [i; x; f(x)]
MH(a, b, f, ε) :=
    i ← 0
    x0 ← a
    x1 ← b
    while |x1 - x0| > ε
        x1 ← x1 - f(x1)*□/(f(b) - f(a))
        fx1 ← f(x1)
        i ← i + 1
        break if fx1 == 0
        b ← x1 if fx1*f(b) > 0
        a ← x1 otherwise
        M[i, 1] ← i
        M[i, 2] ← x1
        M[i, 3] ← f(x1)
    M  # error: Пустой местозаполнитель.
MPD1(5, 7, f, ε) = [18; 6.99999; 2.76953]
x0 := 0.2
MK(a, b, f, ε) :=
    i ← 0
    x1 ← x0 - f(x0)/(d/dx0(f(x0)))
    while |x1 - x0| > ε
        x0 ← x1
        x1 ← x0 - f(x0)/(d/dx0(f(x0)))
        i ← i + 1
        M[i, 1] ← i
        M[i, 2] ← x1
        M[i, 3] ← f(x1)
    M
MK(-2, -1, f, ε) = [
    1, 0.881439, -1.71145;
    2, 2.02303, -1.01006;
    3, -0.183868, -3.14706;
    4, 5.20622, 0.51977;
    5, 5.04858, 0.00571406;
    6, 5.0468, 1.40345e-6;
    7, 5.0468, 8.61533e-14
]
MK(5, 7, f, ε) = [
    1, 0.881439, -1.71145;
    2, 2.02303, -1.01006;
    3, -0.183868, -3.14706;
    4, 5.20622, 0.51977;
    5, 5.04858, 0.00571406;
    6, 5.0468, 1.40345e-6;
    7, 5.0468, 8.61533e-14
]
P2 := MK(-2, -1, f, ε)
P3 := MK(5, 7, f, ε)
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# Метод секущих
двушаговый
mst1(a, b, f, ε, nmax) :=
    return "корней нет" if f(a)*f(b) > 0
    n ← 0
    x0 ← a
    x1 ← b
    while |x1 - x0| > ε and n ≤ nmax
        n ← n + 1
        x ← x1 - f(x1)*(x1 - x0)/(f(x1) - f(x0))
        x0 ← x1
        x1 ← x
        M[n, 1] ← n
        M[n, 2] ← x
        M[n, 3] ← f(x)
    M
ε := 0.000001
mst1(-2, -1, f, ε, 50) = [
    1, -1.79772, -0.145582;
    2, -1.84464, 0.0397099;
    3, -1.83458, -0.000179907;
    4, -1.83463, -2.07858e-7;
    5, -1.83463, 1.10845e-12
]
mst1(5, 7, f, ε, 50) = [
    1, 5.10212, 0.178604;
    2, 4.97129, -0.239311;
    3, 5.0462, -0.00191621;
    4, 5.04681, 2.25115e-5;
    5, 5.0468, -1.86756e-9;
    6, 5.0468, 0
]
Одношаговый
mso(a, b, f, ε, nmax) :=
    return "корней нет" if f(a)*f(b) > 0
    if d^2/da^2(f(a))*f(a) > 0
        c ← a
        x ← b
    otherwise
        c ← b
        x ← a
    n ← 0
    while |f(x)| > ε and n ≤ nmax
        n ← n + 1
        x ← x - f(x)*(x - c)/(f(x) - f(c))
        M[n, 1] ← n
        M[n, 2] ← x
        M[n, 3] ← f(x)
    M
ε := 0.00001
mso(-2, -1, f, ε, 50) = [
    1, -1.79772, -0.145582;
    2, -1.83407, -0.00221514;
    3, -1.83462, -3.09193e-5;
    4, -1.83463, -4.30992e-7
]
mso(5, 7, f, ε, 50) = [
    1, 5.10212, 0.178604;
    2, 4.97129, -0.239311;
    3, 5.13264, 0.27809;
    4, 4.92421, -0.385216;
    5, 5.17768, 0.425766;
    6, 4.84663, -0.618998;
    7, 5.24, 0.631252;
    8, 4.72042, -0.978153;
    9, 5.3154, 0.880239;
    10, 4.53052, -1.4577
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]
PMSO := mso(-2, -1, f, ε, 50)
PMSO2 := mso(5, 7, f, ε, 50)
PMST := mst1(-2, -1, f, ε, 50)
PMST2 := mst1(5, 7, f, ε, 50)
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# Вариант 27
f1(x) := sin(x - 0.5) - x + 0.8
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root(f1(x), x, 0, 2) → 1.74851546754
MK(a, b, f1, ε) :=
    i ← 0
    x1 ← x0 - f1(x0)/(d/dx0(f1(x0)))
    while |x1 - x0| > ε
        x0 ← x1
        x1 ← x0 - f1(x0)/(d/dx0(f1(x0)))
        i ← i + 1
        M[i, 1] ← i
        M[i, 2] ← x1
        M[i, 3] ← f1(x1)
    M
MK(1, 2, f1, ε) = [
    1, -212.586, 213.902;
    2, 1276.09, -1275.19;
    3, -256858, 256857;
    4, 1488.3, -1488.47;
    5, -499.159, 500.103;
    6, -247.782, 248.679;
    7, -123.153, 124.858;
    8, -35.5589, 37.3565;
    9, -0.626275, 0.523458;
    10, 0.292115, 0.301494
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]
P2 := MK(1, 2, f1, ε)
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# Метод секущих
двушаговый
mst1(a, b, f, ε, nmax) :=
    return "корней нет" if f(a)*f(b) > 0
    n ← 0
    x0 ← a
    x1 ← b
    while |x1 - x0| > ε and n ≤ nmax
        n ← n + 1
        x ← x1 - f(x1)*(x1 - x0)/(f(x1) - f(x0))
        x0 ← x1
        x1 ← x
        M[n, 1] ← n
        M[n, 2] ← x
        M[n, 3] ← f(x)
    M
ε := 0.000001
mst1(1, 2, f1, ε, 50) = [
    1, 1.5798, 0.102061;
    2, 1.72061, 0.0186965;
    3, 1.75219, -0.00251935;
    4, 1.74844, 4.93583e-5;
    5, 1.74852, 1.25743e-7;
    6, 1.74852, -6.3054e-12
]
mso(a, b, f, ε, nmax) :=
    return "корней нет" if f(a)*f(b) > 0
    if d^2/da^2(f(a))*f(a) > 0
        c ← a
        x ← b
    otherwise
        c ← b
        x ← a
    n ← 0
    while |f(x)| > ε and n ≤ nmax
        n ← n + 1
        x ← x - f(x)*(x - c)/(f(x) - f(c))
        M[n, 1] ← n
        M[n, 2] ← x
        M[n, 3] ← f(x)
    M
ε := 0.00001
mso(1, 2, f1, ε, 50) = [
    1, 1.5798, 0.102061;
    2, 1.72061, 0.0186965;
    3, 1.74423, 0.00292082;
    4, 1.74786, 0.000444515;
    5, 1.74842, 6.7379e-5;
    6, 1.7485, 1.0207e-5;
    7, 1.74851, 1.54607e-6
]
PMST := mst1(1, 2, f1, ε, 50)
PMSO := mso(1, 2, f1, ε, 50)
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