# Worksheet setting: ORIGIN = 1
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y(x) := sin(x + 0.5) - 1
x1(y1) := cos(y1 - 2)
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x := 0
y := 0
Given
cos(y - 2) + x == 0
y - sin(x + 0.5) == 1
z := Find(x, y) = [-0.521818; 0.978184]
φ(x, y) := [cos(y - 2); sin(x + 0.5) - 1]
a := 0.6
b := 0.45
φ1x(x, y) := d/dx(φ(x, y)[1]) → 0
φ1y(x, y) := d/dy(φ(x, y)[1]) → -sin(y - 2)
|φ1x(a, b)| + |φ1y(a, b)| = 0.999784
φ1x(x, y) := d/dx(φ(x, y)[2]) → cos(x + 0.5)
φ1y(x, y) := d/dy(φ(x, y)[2]) → 0
|φ1x(a, b)| + |φ1y(a, b)| = 0.453596
f(x, y) := [cos(y - 2) + x; y - sin(x + 0.5) - 1]
W(x, y) := [d/dx(f(x, y)[1]), d/dy(f(x, y)[1]); d/dx(f(x, y)[2]), d/dy(f(x, y)[2])]
W(x, y) → [1, sin(2); -0.87758256189, 1]
